fre 30 aug 2024 14:57:23 CEST
$PROBLEM PHENOBARB SIMPLE MODEL

$INPUT ID TIME AMT WGT APGR DV
$DATA pheno.dta IGNORE=@

$SUBROUTINE ADVAN1 TRANS2

$PK
CL=THETA(1)*EXP(ETA(1))
VC=THETA(2)*EXP(ETA(2))
V=VC

$ERROR
CONC=A(1)/VC
IPRED=CONC
Y=CONC+CONC*EPS(1)

$THETA (0,0.00469307) ; POP_CL
$THETA (0,1.00916) ; POP_V
$OMEGA 0.0309626 ; IVCL
$OMEGA 0.031128  ; IVV
$SIGMA 0.013241

$ESTIMATION METHOD=SAEM ISAMPLE=5 ETASAMPLES=1
$COV

$TABLE ID TIME DV PRED CWRES IPRED CIPREDI ETA1 NOAPPEND FILE=sdtab_pheno

NM-TRAN MESSAGES
 WARNINGS AND ERRORS (IF ANY) FOR PROBLEM    1
 (WARNING  2) NM-TRAN INFERS THAT THE DATA ARE POPULATION.
 (WARNING  121) INTERACTION IS IMPLIED WITH EM/BAYES ESTIMATION METHODS
 (WARNING  23) $PK DOES NOT DEFINE A SCALE PARAMETER FOR THE CENTRAL
 COMPARTMENT.  WITH THIS TRANS, IT MAY NOT BE POSSIBLE TO SEPARATELY
 OBTAIN ESTIMATES OF PARAMETERS AFFECTING CLEARANCE AND VOLUME.
Note: Analytical 2nd Derivatives are constructed in FSUBS but are never used.
      You may insert $ABBR DERIV2=NO after the first $PROB to save FSUBS construction and compilation time

1NONLINEAR MIXED EFFECTS MODEL PROGRAM (NONMEM) VERSION 7.5.1
 ORIGINALLY DEVELOPED BY STUART BEAL, LEWIS SHEINER, AND ALISON BOECKMANN
 CURRENT DEVELOPERS ARE ROBERT BAUER, ICON DEVELOPMENT SOLUTIONS,
 AND ALISON BOECKMANN. IMPLEMENTATION, EFFICIENCY, AND STANDARDIZATION
 PERFORMED BY NOUS INFOSYSTEMS.
 PROBLEM NO.:         1
 PHENOBARB SIMPLE MODEL
 TOT. NO. OF OBS RECS:      155
 TOT. NO. OF INDIVIDUALS:       59
 ONE COMPARTMENT MODEL (ADVAN1)
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 #TBLN:      1
 #METH: Stochastic Approximation Expectation-Maximization
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
 #TERM:
 STOCHASTIC PORTION WAS NOT TESTED FOR CONVERGENCE
 REDUCED STOCHASTIC PORTION WAS COMPLETED

 ETABAR IS THE ARITHMETIC MEAN OF THE ETA-ESTIMATES,
 AND THE P-VALUE IS GIVEN FOR THE NULL HYPOTHESIS THAT THE TRUE MEAN IS 0.

 ETABAR:         2.1341E-03  2.0535E-02
 SE:             3.0102E-02  5.6227E-02
 N:                      59          59

 P VAL.:         9.4348E-01  7.1495E-01

 ETASHRINKSD(%)  3.6441E+01  3.2768E+00
 ETASHRINKVR(%)  5.9603E+01  6.4462E+00
 EBVSHRINKSD(%)  3.6438E+01  3.1671E+00
 EBVSHRINKVR(%)  5.9598E+01  6.2338E+00
 RELATIVEINF(%)  3.9915E+01  9.2635E+01
 EPSSHRINKSD(%)  2.8030E+01
 EPSSHRINKVR(%)  4.8204E+01


 TOTAL DATA POINTS NORMALLY DISTRIBUTED (N):          155
 N*LOG(2PI) CONSTANT TO OBJECTIVE FUNCTION:    284.87094529344853
 OBJECTIVE FUNCTION VALUE WITHOUT CONSTANT:    366.33573391569922
 OBJECTIVE FUNCTION VALUE WITH CONSTANT:       651.20667920914775
 REPORTED OBJECTIVE FUNCTION DOES NOT CONTAIN CONSTANT

 TOTAL EFFECTIVE ETAS (NIND*NETA):                           118
 NIND*NETA*LOG(2PI) CONSTANT TO OBJECTIVE FUNCTION:    216.86949383630275
 OBJECTIVE FUNCTION VALUE WITHOUT CONSTANT:    366.33573391569922
 OBJECTIVE FUNCTION VALUE WITH CONSTANT:       583.20522775200197
 REPORTED OBJECTIVE FUNCTION DOES NOT CONTAIN CONSTANT


 #TERE:
 Elapsed estimation  time in seconds:    31.27
 Elapsed covariance  time in seconds:     0.01

 ********************                STOCHASTIC APPROXIMATION EXPECTATION-MAXIMIZATION               ********************
 #OBJT:**************                        FINAL VALUE OF LIKELIHOOD FUNCTION                      ********************
 #OBJV:********************************************      366.336       **************************************************

 ********************                STOCHASTIC APPROXIMATION EXPECTATION-MAXIMIZATION               ********************
 ********************                             FINAL PARAMETER ESTIMATE                           ********************

 THETA - VECTOR OF FIXED EFFECTS PARAMETERS   *********
         TH 1      TH 2
         5.62E-03  1.40E+00

 OMEGA - COV MATRIX FOR RANDOM EFFECTS - ETAS  ********
         ETA1      ETA2
 ETA1
+        1.32E-01
 ETA2
+        0.00E+00  1.99E-01

 SIGMA - COV MATRIX FOR RANDOM EFFECTS - EPSILONS  ****
         EPS1
 EPS1
+        1.52E-02

 OMEGA - CORR MATRIX FOR RANDOM EFFECTS - ETAS  *******
         ETA1      ETA2
 ETA1
+        3.64E-01
 ETA2
+        0.00E+00  4.47E-01

 SIGMA - CORR MATRIX FOR RANDOM EFFECTS - EPSILONS  ***
         EPS1
 EPS1
+        1.23E-01

 ********************                STOCHASTIC APPROXIMATION EXPECTATION-MAXIMIZATION               ********************
 ********************                          STANDARD ERROR OF ESTIMATE (S)                        ********************

 THETA - VECTOR OF FIXED EFFECTS PARAMETERS   *********
         TH 1      TH 2
         5.24E-04  1.27E-01

 OMEGA - COV MATRIX FOR RANDOM EFFECTS - ETAS  ********
         ETA1      ETA2
 ETA1
+        4.44E-02
 ETA2
+        0.00E+00  4.09E-02

 SIGMA - COV MATRIX FOR RANDOM EFFECTS - EPSILONS  ****
         EPS1
 EPS1
+        3.22E-03

 OMEGA - CORR MATRIX FOR RANDOM EFFECTS - ETAS  *******
         ETA1      ETA2
 ETA1
+        6.10E-02
 ETA2
+       .........  4.58E-02

 SIGMA - CORR MATRIX FOR RANDOM EFFECTS - EPSILONS  ***
         EPS1
 EPS1
+        1.30E-02

 ********************                STOCHASTIC APPROXIMATION EXPECTATION-MAXIMIZATION               ********************
 ********************                        COVARIANCE MATRIX OF ESTIMATE (S)                       ********************

            TH 1      TH 2      OM11      OM12      OM22      SG11
 TH 1
+        2.74E-07
 TH 2
+       -3.91E-05  1.62E-02
 OM11
+        1.93E-06 -5.43E-04  1.97E-03
 OM12
+       ......... ......... ......... .........
 OM22
+        2.84E-06 -2.66E-03 -1.99E-04  0.00E+00  1.67E-03
 SG11
+        9.73E-08  6.22E-06 -7.00E-05  0.00E+00 -3.04E-05  1.04E-05

 ********************                STOCHASTIC APPROXIMATION EXPECTATION-MAXIMIZATION               ********************
 ********************                        CORRELATION MATRIX OF ESTIMATE (S)                      ********************

            TH 1      TH 2      OM11      OM12      OM22      SG11
 TH 1
+        5.24E-04
 TH 2
+       -5.87E-01  1.27E-01
 OM11
+        8.30E-02 -9.62E-02  4.44E-02
 OM12
+       ......... ......... ......... .........
 OM22
+        1.33E-01 -5.11E-01 -1.10E-01  0.00E+00  4.09E-02
 SG11
+        5.77E-02  1.52E-02 -4.90E-01  0.00E+00 -2.31E-01  3.22E-03
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 Elapsed postprocess time in seconds:     0.02
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 Elapsed finaloutput time in seconds:     0.03
 #CPUT: Total CPU Time in Seconds,       31.379
