$PROBLEM
$INPUT ID VISI DAT1 DGRP DOSE FLAG ONO XIME DVO NEUY SCR AGE SEX NYHA WT COMP IACE DIG DIU NUMB TAD TIME VID CRCL AMT SS II VID1 CMT=DROP CONO DV EVID OVID SHR SHR2
$DATA mox_simulated.csv IGNORE=@
$SUBROUTINES ADVAN2  TRANS2
$PK
CL = THETA(1) * EXP(ETA(1))
VC = THETA(2) * EXP(ETA(2))
MAT = THETA(3) * EXP(ETA(3))
KA = 1/MAT
V = VC
$ERROR
CONC = A(2)/VC
Y = CONC + CONC * EPS(1)
$ESTIMATION METHOD=0
$THETA (0, 10.0, Inf) ; POP_CL
$THETA (0, 100, Inf) ; POP_VC
$THETA (0, 3.0, Inf) ; POP_MAT
$OMEGA 0.1; IIV_CL
$OMEGA 0.1; IIV_VC
$OMEGA 0.1; IIV_MAT
$SIGMA 0.1; RUV_PROP
